// SBML level 3 version 2

model toggle_switch()

  // Compartments:
  compartment default_compartment = 1;

  // Species:
  species U in default_compartment = 0.2;  // uniprot:P03023
  species V in default_compartment = 0.4;  // uniprot:P03034

  // Parameters:
  alpha1 = 156.25;  // isDescribedBy biomodels.db:BIOMD0000000507
  beta = 2.5;  // isDescribedBy biomodels.db:BIOMD0000000507
  alpha2 = 15.6;  // isDescribedBy biomodels.db:BIOMD0000000507
  gam = 1;  // isDescribedBy biomodels.db:BIOMD0000000507

  // Reactions:
  J1: -> U; alpha1/(1 + V^beta);  // modifiers: V; isDescribedBy doi:10.1038/35002131
  J2: U -> ; U;  // isDescribedBy doi:10.1038/35002131
  J3: -> V; alpha2/(1 + U^gam);  // modifiers: U; isDescribedBy doi:10.1038/35002131
  J4: V -> ; V;  // isDescribedBy doi:10.1038/35002131
end
